<?xml version="1.0" encoding="UTF-8"?>
<!-- Generated by Aero-Matic v 1.1

     Inputs:
                horsepower: 800
                     pitch: fixed
            max engine rpm: 2450
        prop diameter (ft): 9.843

     Outputs:
              max prop rpm: 1906.23
                gear ratio:    1.29
                       Cp0: 0.062450
                       Ct0: 0.087430
       static thrust (lbs): 2110.61
-->

<propeller name="prop">
  <ixx>  28.45 </ixx>
  <diameter unit="IN"> 118.1 </diameter>
  <numblades> 3 </numblades>
  <gearratio>  1.29 </gearratio>
  <p_factor>   9.33 </p_factor>

  <table name="C_THRUST" type="internal">
     <tableData>
       0.0   0.0953
       0.1   0.0914
       0.2   0.0874
       0.3   0.0804
       0.4   0.0722
       0.5   0.0636
       0.6   0.0515
       0.7   0.0391
       0.8   0.0212
       1.0  -0.0072
       1.2  -0.0375
       1.4  -0.0675
     </tableData>
  </table>


  <table name="C_POWER" type="internal">
     <tableData>
       0.0   0.0640
       0.1   0.0640
       0.2   0.0625
       0.3   0.0610
       0.4   0.0575
       0.5   0.0526
       0.6   0.0483
       0.7   0.0406
       0.8   0.0332
       1.0   0.0119
       1.2  -0.0189
       1.4  -0.0570
       1.6  -0.0967
     </tableData>
  </table>

<!-- thrust effects of helical tip Mach -->
<table name="CT_MACH" type="internal">
  <tableData>
    0.85   1.0
    1.05   0.8
  </tableData>
</table>

<!-- power-required effects of helical tip Mach -->
<table name="CP_MACH" type="internal">
  <tableData>
    0.85   1.0
    1.05   1.8
    2.00   1.4
  </tableData>
</table>

</propeller>
