<?xml version="1.0" encoding="UTF-8"?>
<!--
  File:     Mitubishi_zuisei-13.xml
  Author:   Aero-Matic v 0.82

  Inputs:
    name:           Mitubishi_zuisei-13
    type:           piston
    power:          800 hp
    augmented?      no
    injected?       no
-->

<piston_engine name="Mitubishi_zuisei-13">
  <minmp unit="INHG">          6.0 </minmp>
  <maxmp unit="INHG">         28.5 </maxmp>
  <displacement unit="IN3"> 1520.00 </displacement>
  <maxhp>        800.00 </maxhp>
  <cycles>         4.0 </cycles>
  <idlerpm>      700.0 </idlerpm>
  <maxrpm>      2800.0 </maxrpm>
  <maxthrottle>    1.0 </maxthrottle><!-- Deprecated -->
  <minthrottle>    0.1 </minthrottle><!-- Deprecated -->
  <sparkfaildrop>  0.1 </sparkfaildrop>
  <volumetric-efficiency> 0.85 </volumetric-efficiency>
<!-- Optional items that affect engine performance -->
 <!-- Defining <bsfc> over-rides the built-in horsepower calculations -->
 <!--<bsfc>           0.45 </bsfc>-->
 <!--<stroke unit="IN">  4.375  </stroke>-->
 <!--<bore unit="IN">    5.125 </bore>-->
 <!--<cylinders>         4.0  </cylinders>-->
 <!--<compression-ratio> 8.0 </compression-ratio>-->
</piston_engine>
